# Угловые скорости звеньев
A01 := [cos(q1), -sin(q1), 0; sin(q1), cos(q1), 0; 0, 0, 1]
A12 := [0, 0, 1; cos(q2), -sin(q2), 0; sin(q2), cos(q2), 0]
A23 := [cos(q3), -sin(q3), 0; sin(q3), cos(q3), 0; 0, 0, 1]
Ω00 := [0; 0; 0]
ω11 := [0; 0; dq1]
ω22 := [0; 0; dq2]
ω33 := [0; 0; dq3]
Ω01 := transpose(A01)*Ω00
Ω11 := Ω01 + ω11
Ω12 := transpose(A12)*Ω11
Ω22 := Ω12 + ω22
Ω23 := transpose(A23)*Ω22
Ω33 := Ω23 + ω33
# Угловые ускорения звеньев
ddq2 → ddq2
E00 := [0; 0; 0]
ε11 := [0; 0; ddq1]
ε22(t) := [0; 0; ddq2]
ε33(t) := [0; 0; ddq3]
E11 → E11
E11 := transpose(A01)*E00 + Ω11×ω11 + ε11
E22 := transpose(A12)*E11 + Ω22×ω22 + [0; 0; ddq2]
E22 := transpose(A12)*E11 + Ω22×ω22 + ε22  # disabled
E22 → [ddq1*sin(q2) + dq1*dq2*cos(q2); ddq1*cos(q2) - dq1*dq2*sin(q2); ddq2]
E33 := transpose(A23)*E22 + Ω33×ω33 + [0; 0; ddq3]
E33 := transpose(A23)*E22 + Ω33×ω33 + ε33  # disabled
E33 → [
    dq3*(dq1*cos(q2)*cos(q3) - dq1*sin(q2)*sin(q3)) + cos(q3)*(ddq1*sin(q2) + dq1*dq2*cos(q2)) + sin(q3)*(ddq1*cos(q2) - dq1*dq2*sin(q2));
    cos(q3)*(ddq1*cos(q2) - dq1*dq2*sin(q2)) - dq3*(dq1*cos(q2)*sin(q3) + dq1*cos(q3)*sin(q2)) - sin(q3)*(ddq1*sin(q2) + dq1*dq2*cos(q2));
    ddq2 + ddq3
]
# Определение скоростей точек звеньев
ro10 := [0; 0; 0]
ro21 := [0; 0; l1]
ro32 := [0; l2; 0]
rM3 := [l3; 0; 0]
Vo00 := [0; 0; 0]
νo10 := [0; 0; 0]
νo21 := [0; 0; 0]
νo32 := [0; 0; 0]
Vo11 := transpose(A01)*(Vo00 + Ω00×ro10 + νo10)
Vo22 := transpose(A12)*(Vo11 + Ω11×ro21 + νo21)
Vo33 := transpose(A23)*(Vo22 + Ω22×ro32 + νo32)
VM3 := Vo33 + Ω33×rM3
# Определение ускорений точек звеньев
Wo00 := [0; 0; 0]
Wo10 := [0; 0; 0]
Wo21 := [0; 0; 0]
Wo32 := [0; 0; 0]
Wo11 := transpose(A01)*(Wo00 + E00×ro10 + Ω00×(Ω00×ro10) + 2*Ω00×νo10 + Wo10)
Wo22 := transpose(A12)*(Wo11 + E11×ro21 + Ω11×(Ω11×ro21) + 2*Ω11×νo21 + Wo21)
Wo33 := transpose(A23)*(Wo22 + E22×ro32 + Ω22×(Ω22×ro32) + 2*Ω22×νo32 + Wo32)
Wm3 := Wo33 + E33×rM3 + Ω33×(Ω33×rM3)
Wo33 → [
    -sin(q3)*(l2*dq1^2*sin(q2)^2 + l2*dq2^2) - cos(q3)*(ddq2*l2 - dq1^2*l2*cos(q2)*sin(q2));
    sin(q3)*(ddq2*l2 - dq1^2*l2*cos(q2)*sin(q2)) - cos(q3)*(l2*dq1^2*sin(q2)^2 + l2*dq2^2);
    l2*(ddq1*sin(q2) + dq1*dq2*cos(q2)) + dq1*dq2*l2*cos(q2)
]
E33×rM3 → [
    0;
    l3*(ddq2 + ddq3);
    l3*(dq3*(dq1*cos(q2)*sin(q3) + dq1*cos(q3)*sin(q2)) - cos(q3)*(ddq1*cos(q2) - dq1*dq2*sin(q2)) + sin(q3)*(ddq1*sin(q2) + dq1*dq2*cos(q2)))
]
# Проверка значения Wm3
Ω33×(Ω33×rM3) → [
    -l3*(dq2 + dq3)^2 - l3*(dq1*cos(q2)*cos(q3) - dq1*sin(q2)*sin(q3))^2;
    l3*(dq1*cos(q2)*sin(q3) + dq1*cos(q3)*sin(q2))*(dq1*cos(q2)*cos(q3) - dq1*sin(q2)*sin(q3));
    l3*(dq1*cos(q2)*sin(q3) + dq1*cos(q3)*sin(q2))*(dq2 + dq3)
]
W1m3 := [
    -l3*(dq2 + dq3)^2 - l3*(dq1*cos(q2)*cos(q3) - dq1*sin(q2)*sin(q3))^2;
    l3*(dq1*cos(q2)*sin(q3) + dq1*cos(q3)*sin(q2))*(dq1*cos(q2)*cos(q3) - dq1*sin(q2)*sin(q3));
    l3*(dq1*cos(q2)*sin(q3) + dq1*cos(q3)*sin(q2))*(dq2 + dq3)
] + [
    0;
    l3*(ddq2 + ddq3);
    l3*(dq3*(dq1*cos(q2)*sin(q3) + dq1*cos(q3)*sin(q2)) - cos(q3)*(ddq1*cos(q2) - dq1*dq2*sin(q2)) + sin(q3)*(ddq1*sin(q2) + dq1*dq2*cos(q2)))
] + [
    -sin(q3)*(l2*dq1^2*sin(q2)^2 + l2*dq2^2) - cos(q3)*(ddq2*l2 - dq1^2*l2*cos(q2)*sin(q2));
    sin(q3)*(ddq2*l2 - dq1^2*l2*cos(q2)*sin(q2)) - cos(q3)*(l2*dq1^2*sin(q2)^2 + l2*dq2^2);
    l2*(ddq1*sin(q2) + dq1*dq2*cos(q2)) + dq1*dq2*l2*cos(q2)
]
W1m3 simplify → [
    dq1^2*l2*sin(2*q2 + q3)/2 - dq2^2*l3 - dq3^2*l3 - 2*dq2*dq3*l3 - ddq2*l2*cos(q3) - dq1^2*l3*cos(2*q2 + 2*q3)/2 - dq1^2*l2*sin(q3)/2 - dq2^2*l2*sin(q3) - dq1^2*l3/2;
    ddq2*l3 + ddq3*l3 + ddq2*l2*sin(q3) + dq1^2*l3*sin(2*q2 + 2*q3)/2 - dq1^2*l2*cos(q3)/2 - dq2^2*l2*cos(q3) + dq1^2*l2*cos(2*q2 + q3)/2;
    ddq1*l2*sin(q2) - ddq1*l3*cos(q2 + q3) + 2*dq1*dq2*l3*sin(q2 + q3) + 2*dq1*dq3*l3*sin(q2 + q3) + 2*dq1*dq2*l2*cos(q2)
]
# Скорости и ускорения центров масс звеньев
rc11 := [0; 0; l1/2]
Vc11 := Vo11 + Ω11×rc11
Wc11 := Wo11 + E11×rc11 + Ω11×(Ω11×rc11)
rc22 := [0; l2/2; 0]
Vc22 := Vo22 + Ω22×rc22
Wc22 := Wo22 + E22×rc22 + Ω22×(Ω22×rc22)
rc33 := [l3/2; 0; 0]
Vc33 := Vo33 + Ω33×rc33
Wc33 := Wo33 + E33×rc33 + Ω33×(Ω33×rc33)
# Динамика робота с жесткими звеньями
Ic1 := [J_x1, 0, 0; 0, J_y1, 0; 0, 0, J_z1]
Ic2 := [J_x2, 0, 0; 0, J_y2, 0; 0, 0, J_z2]
Ic3 := [J_x3, 0, 0; 0, J_y3, 0; 0, 0, J_z3]
T_1 := 1/2*m_1*transpose(Vc11)*Vc11 + 1/2*transpose(Ω11)*(Ic1*Ω11)
T_2 := 1/2*m_2*transpose(Vc22)*Vc22 + 1/2*transpose(Ω22)*(Ic2*Ω22)
T_3 := 1/2*m_3*transpose(Vc33)*Vc33 + 1/2*transpose(Ω33)*(Ic3*Ω33)
T := T_1 + T_2 + T_3
d/dq1(T) simplify → 0  # правильно
d/ddq1(T) simplify → dq1*(4*J_x2 + 4*J_x3 + 4*J_y2 + 8*J_z1 + 4*J_y3 - 4*J_x2*cos(2*q2) + 4*J_y2*cos(2*q2) + l2^2*m_2 + 4*l2^2*m_3 + l3^2*m_3 - 4*J_x3*cos(2*q2 + 2*q3) + 4*J_y3*cos(2*q2 + 2*q3) - l2^2*m_2*cos(2*q2) - 4*l2^2*m_3*cos(2*q2) + l3^2*m_3*cos(2*q2 + 2*q3) + 4*l2*l3*m_3*sin(q3) - 4*l2*l3*m_3*sin(2*q2 + q3))/8
d/dq2(T) simplify → dq1^2*(4*J_x2*sin(2*q2) - 4*J_y2*sin(2*q2) + 4*J_x3*sin(2*q2 + 2*q3) - 4*J_y3*sin(2*q2 + 2*q3) + l2^2*m_2*sin(2*q2) + 4*l2^2*m_3*sin(2*q2) - l3^2*m_3*sin(2*q2 + 2*q3) - 4*l2*l3*m_3*cos(2*q2 + q3))/8
d/ddq2(T) simplify → J_z2*dq2 + J_z3*dq2 + J_z3*dq3 + dq2*l2^2*m_2/4 + dq2*l2^2*m_3 + dq2*l3^2*m_3/4 + dq3*l3^2*m_3/4 + dq2*l2*l3*m_3*sin(q3) + dq3*l2*l3*m_3*sin(q3)/2
d/dq3(T) simplify → J_x3*dq1^2*sin(2*q2 + 2*q3)/2 - J_y3*dq1^2*sin(2*q2 + 2*q3)/2 - dq1^2*l3^2*m_3*sin(2*q2 + 2*q3)/8 + dq1^2*l2*l3*m_3*cos(q3)/4 + dq2^2*l2*l3*m_3*cos(q3)/2 - dq1^2*l2*l3*m_3*cos(2*q2 + q3)/4 + dq2*dq3*l2*l3*m_3*cos(q3)/2
d/ddq3(T) simplify → J_z3*dq2 + J_z3*dq3 + dq2*l3^2*m_3/4 + dq3*l3^2*m_3/4 + dq2*l2*l3*m_3*sin(q3)/2
# Матрицы перехода из прямой задачи геометрического анализа
H_01 := [cos(q1), -sin(q1), 0, 0; sin(q1), cos(q1), 0, 0; 0, 0, 1, 0; 0, 0, 0, 1]
H_12 := [0, 0, 1, 0; cos(q2), -sin(q2), 0, 0; sin(q2), cos(q2), 0, 0.8; 0, 0, 0, 1]
H_23 := [cos(q3), -sin(q3), 0, 0; sin(q3), cos(q3), 0, 0.9; 0, 0, 1, 0; 0, 0, 0, 1]
rc33 := [l3/2; 0; 0]
R_C33 := [l3/2; 0; 0; 1]
R_C30 := H_01*H_12*H_23*R_C33
R_C20 := H_01*H_12*R_C22
rc22 := [0; l2/2; 0]
R_C22 := [0; l2/2; 0; 1]
R_C10 := H_01*R_C11
rc11 := [0; 0; l1/2]
R_C11 := [0; 0; l1/2; 1]
Q_C3(t) := -m_3*g*(d/d(q3(t))(R_C30(t)[2]))  # error: A name is required here.
Q_C2(t) := -m_3*g*(d/d(q2(t))(R_C30(t)[2])) - m_2*g*(d/d(q2(t))(R_C20(t)[2]))  # error: A name is required here.
Q_C1(t) := -m_3*g*(d/d(q1(t))(R_C30(t)[2])) - m_2*g*(d/d(q1(t))(R_C20(t)[2])) - m_1*g*(d/d(q1(t))(R_C10(t)[2]))  # error: A name is required here.
# это R.C30 | это R.C20 | это R.C10
d/dq3(R_C30[2]) simplify → l3*cos(q2 + q3)/2
d/dq2(R_C30[2]) simplify → 0.5*l3*cos(q2 + q3) - 0.9*sin(q2)
d/dq2(0.5*l2*cos(q2) + 0.8) simplify → -0.5*l2*sin(q2)
d/dq1(l2*cos(q2)/2 + 0.8) simplify → 0
d/dq1(l1/2) simplify → 0
d/dq1(R_C30[2]) simplify → 0
Q_C3 := -m_3*g*(l3*cos(q2 + q3)/2)
-m_3*g*(l3*cos(q2 + q3)/2) → -g*l3*m_3*cos(q2 + q3)/2
Q_C2 := -m_3*g*(0.5*l3*cos(q2 + q3) - 0.9*sin(q2)) - m_2*g*(-0.5*l2*sin(q2))
-m_3*g*(0.5*l3*cos(q2 + q3) - 0.9*sin(q2)) - m_2*g*(-0.5*l2*sin(q2)) → 0.5*g*l2*m_2*sin(q2) - g*m_3*(-0.9*sin(q2) + 0.5*l3*cos(q2 + q3))
Q_C1 := -m_3*g*0 - m_2*g*0 - m_1*g*0 → 0
